# OpenSim document version 40500
Model Humanoid_Roobt:
  gravity: 0 -9.80665 0
  length_units: meters
  force_units: N
  Ground
  BodySet:
    Body HAT: mass=28.9028 [kg] mass_center=(0 0 0) inertia=(0.7750549 0.4286477 0.5658596 -9e-7 -1.9e-7 0.00323226)
        meshes=assets/HAT.stl
    Body HAT-pelvis: mass=1.510604 mass_center=(0 0 0)
        inertia=(0.00099385 0.00119054 0.00097228 9.26e-6 -3.85e-6 -0.00011617) meshes=assets/HAT-pelvis.stl
    Body Pelvis: mass=13.7249 mass_center=(0 0 0) inertia=(0.01238805 0.01076573 0.0095041 2.116e-5 2.2e-6 -3.083e-5)
        meshes=assets/Pelvis.stl
    Body Pelvis-thigh-r: mass=1.639232 mass_center=(0 0 0)
        inertia=(0.001812541 0.00136734 0.00104874 -3.43e-6 -7.24e-6 9.3e-6) meshes=assets/Pelvis-thigh-r.stl
    Body Pelvis-thigh-l: mass=1.639232 mass_center=(0 0 0)
        inertia=(0.00181837 0.00136029 0.00104874 -3.43e-6 -4.16e-6 1.74e-6) meshes=assets/Pelvis-thigh-l.stl
    Body Thigh-1-l: mass=1.687124 mass_center=(0 0 0)
        inertia=(0.0017623 0.00151983 0.00175026 0.00011086 -1.003e-5 -5.3e-6) meshes=assets/Thigh-1-l.stl
    Body Thigh-1-r: mass=1.687124 mass_center=(0 0 0)
        inertia=(0.0017623 0.00151983 0.00175026 0.00011086 -1.003e-5 -5.3e-6) meshes=assets/Thigh-1-r.stl
    Body Thigh-2-l: mass=1.82853 mass_center=(0 0 0)
        inertia=(0.00291013 0.00149501 0.00340175 9.79e-6 3.45e-6 4.003e-5) meshes=assets/Thigh-2-l.stl
    Body Thigh-2-r: mass=1.82853 mass_center=(0 0 0)
        inertia=(0.00289256 0.00147387 0.00336304 -9.98e-6 -4.54e-6 -3.7924e-5) meshes=assets/Thigh-2-r.stl
    Body Shank-l: mass=2.160517 mass_center=(0 0 0)
        inertia=(0.01184964 0.00247261 0.01169203 -2.11e-6 1.45e-6 -0.00085779) meshes=assets/Shank-l.stl
    Body Shank-r: mass=2.160517 mass_center=(0 0 0) inertia=(0.01184776 0.00246936 0.01169442 1.43e-6 9e-7 0.00080482)
        meshes=assets/Shank-r.stl
    Body Foot-l: mass=0.6154745 mass_center=(0 0 0)
        inertia=(0.0003333 0.00115859 0.00115399 0.00012595 -4.119e-5 6.31e-6) meshes=assets/Foot-l.stl
    Body Foot-r: mass=0.6154745 mass_center=(0 0 0)
        inertia=(0.0003333 0.00115859 0.00115399 0.00012595 -4.119e-5 6.31e-6) meshes=assets/Foot-r.stl
  JointSet:
    CustomJoint ground_Pelvis: socket_parent_frame=ground_offset socket_child_frame=Pelvis_offset
      Coordinate pelvis_tilt_global: default_value=0 range=(-1.570796 1.570796) clamped=false
      Coordinate pelvis_list_global: default_value=0 range=(-1.570796 1.570796) clamped=false
      Coordinate pelvis_rotation_global: default_value=0 range=(-1.570796 1.570796) clamped=false
      Coordinate pelvis_tx_global: default_value=0 range=(-999 999) clamped=false
      Coordinate pelvis_ty_global: default_value=0.6 range=(-1 2) clamped=true
      Coordinate pelvis_tz_global: default_value=0 range=(-1 2) clamped=true
      PhysicalOffsetFrame ground_offset: socket_parent=/ground translation=(0 0 0) [meters]
      PhysicalOffsetFrame Pelvis_offset: socket_parent=/bodyset/Pelvis translation=(0 0 0)
      SpatialTransform:
        TransformAxis rotation1: coordinates=pelvis_tilt_global axis=(0 0 1) LinearFunction(coefficients=1 0)
        TransformAxis rotation2: coordinates=pelvis_list_global axis=(1 0 0) LinearFunction(coefficients=1 0)
        TransformAxis rotation3: coordinates=pelvis_rotation_global axis=(0 1 0) LinearFunction(coefficients=1 0)
        TransformAxis translation1: coordinates=pelvis_tx_global axis=(1 0 0) LinearFunction(coefficients=1 0)
        TransformAxis translation2: coordinates=pelvis_ty_global axis=(0 1 0) LinearFunction(coefficients=1 0)
        TransformAxis translation3: coordinates=pelvis_tz_global axis=(0 0 1) LinearFunction(coefficients=1 0)
    PinJoint pelvis_tilt: socket_parent_frame=HAT_offset socket_child_frame=HAT-pelvis_offset
      Coordinate pelvis_tilt: default_value=0 range=(-7 7) clamped=false
      PhysicalOffsetFrame HAT_offset: socket_parent=/bodyset/HAT translation=(0 -0.18617 0)
          orientation=(0 3.141593 0) [radians]
      PhysicalOffsetFrame HAT-pelvis_offset: socket_parent=/bodyset/HAT-pelvis translation=(0 0.07876 -0.00223)
          orientation=(0 3.141593 0)
    PinJoint pelvis_rotation: socket_parent_frame=HAT-pelvis_offset socket_child_frame=Pelvis_offset
      Coordinate pelvis_rotation: default_value=0 range=(-7 7) clamped=false
      PhysicalOffsetFrame HAT-pelvis_offset: socket_parent=/bodyset/HAT-pelvis translation=(0 0.01947 -0.00223)
          orientation=(-1.5714 0 0)
      PhysicalOffsetFrame Pelvis_offset: socket_parent=/bodyset/Pelvis translation=(0 0.11513 0)
          orientation=(-1.5708 0 0)
    PinJoint hip_flexion_r: socket_parent_frame=Pelvis_offset socket_child_frame=Pelvis-thigh-r_offset
      Coordinate hip_flexion_r: default_value=0 range=(-7 7) clamped=false
      PhysicalOffsetFrame Pelvis_offset: socket_parent=/bodyset/Pelvis translation=(0 -0.00687 0.065)
      PhysicalOffsetFrame Pelvis-thigh-r_offset: socket_parent=/bodyset/Pelvis-thigh-r
          translation=(-0.01352 0.00276 -0.07256)
    PinJoint hip_flexion_l: socket_parent_frame=Pelvis_offset socket_child_frame=Pelvis-thigh-l_offset
      Coordinate hip_flexion_l: default_value=0 range=(-7 7) clamped=false
      PhysicalOffsetFrame Pelvis_offset: socket_parent=/bodyset/Pelvis translation=(0 -0.00687 -0.065)
      PhysicalOffsetFrame Pelvis-thigh-l_offset: socket_parent=/bodyset/Pelvis-thigh-l
          translation=(-0.01352 0.00276 0.07256)
    PinJoint hip_adduction_r: socket_parent_frame=Pelvis-thigh-r_offset socket_child_frame=Thigh-1-r_offset
      Coordinate hip_adduction_r: default_value=0 range=(-7 7) clamped=false
      PhysicalOffsetFrame Pelvis-thigh-r_offset: socket_parent=/bodyset/Pelvis-thigh-r
          translation=(-0.02341 0.00418 0.00244) orientation=(0 -1.5708 0)
      PhysicalOffsetFrame Thigh-1-r_offset: socket_parent=/bodyset/Thigh-1-r translation=(-0.01034 0.12639 0)
          orientation=(0 -1.5708 0)
    PinJoint hip_adduction_l: socket_parent_frame=Pelvis-thigh-l_offset socket_child_frame=Thigh-1-l_offset
      Coordinate hip_adduction_l: default_value=0 range=(-7 7) clamped=false
      PhysicalOffsetFrame Pelvis-thigh-l_offset: socket_parent=/bodyset/Pelvis-thigh-l
          translation=(-0.02341 0.00418 -0.00244) orientation=(0 1.5708 0)
      PhysicalOffsetFrame Thigh-1-l_offset: socket_parent=/bodyset/Thigh-1-l translation=(-0.01034 0.12639 0)
          orientation=(0 1.5708 0)
    PinJoint hip_rotation_r: socket_parent_frame=Thigh-1-r_offset socket_child_frame=Thigh-2-r_offset
      Coordinate hip_rotation_r: default_value=0 range=(-7 7) clamped=false
      PhysicalOffsetFrame Thigh-1-r_offset: socket_parent=/bodyset/Thigh-1-r translation=(0 -0.0286 0)
          orientation=(1.5708 0 0)
      PhysicalOffsetFrame Thigh-2-r_offset: socket_parent=/bodyset/Thigh-2-r translation=(-0.00072 0.08883 -0.00947)
          orientation=(1.5708 0 0)
    PinJoint hip_rotation_l: socket_parent_frame=Thigh-1-l_offset socket_child_frame=Thigh-2-l_offset
      Coordinate hip_rotation_l: default_value=0 range=(-7 7) clamped=false
      PhysicalOffsetFrame Thigh-1-l_offset: socket_parent=/bodyset/Thigh-1-l translation=(0 -0.0286 0)
          orientation=(-1.5708 0 0)
      PhysicalOffsetFrame Thigh-2-l_offset: socket_parent=/bodyset/Thigh-2-l translation=(-0.00072 0.08883 0.00947)
          orientation=(-1.5708 0 0)
    PinJoint knee_flexion_r: socket_parent_frame=Thigh-2-r_offset socket_child_frame=Shank-r_offset
      Coordinate knee_flexion_r: default_value=0 range=(-7 7) clamped=false
      PhysicalOffsetFrame Thigh-2-r_offset: socket_parent=/bodyset/Thigh-2-r translation=(0 -0.01167 -0.02567)
      PhysicalOffsetFrame Shank-r_offset: socket_parent=/bodyset/Shank-r translation=(0 0.14669 -0.03346)
    PinJoint knee_flexion_l: socket_parent_frame=Thigh-2-l_offset socket_child_frame=Shank-l_offset
      Coordinate knee_flexion_l: default_value=0 range=(-7 7) clamped=false
      PhysicalOffsetFrame Thigh-2-l_offset: socket_parent=/bodyset/Thigh-2-l translation=(0 -0.01167 0.02567)
      PhysicalOffsetFrame Shank-l_offset: socket_parent=/bodyset/Shank-l translation=(0 0.14669 0.03346)
    PinJoint ankle_dorsiflexion_r: socket_parent_frame=Shank-r_offset socket_child_frame=Foot-r_offset
      Coordinate ankle_dorsiflexion_r: default_value=0 range=(-7 7) clamped=false
      PhysicalOffsetFrame Shank-r_offset: socket_parent=/bodyset/Shank-r translation=(0 -0.15331 0.00554)
      PhysicalOffsetFrame Foot-r_offset: socket_parent=/bodyset/Foot-r translation=(-0.00588 0.02569 0)
    PinJoint ankle_dorsiflexion_l: socket_parent_frame=Shank-l_offset socket_child_frame=Foot-l_offset
      Coordinate ankle_dorsiflexion_l: default_value=0 range=(-7 7) clamped=false
      PhysicalOffsetFrame Shank-l_offset: socket_parent=/bodyset/Shank-l translation=(0 -0.15331 -0.00554)
      PhysicalOffsetFrame Foot-l_offset: socket_parent=/bodyset/Foot-l translation=(-0.00588 0.02569 0)
